<Node name="root">
    <Node name="plugins">
        <RequiredPlugin name="SOFABlender"/> <!-- Needed to use components [BlenderClient] -->
        <RequiredPlugin name="Sofa.Component.Constraint.Projective"/> <!-- Needed to use components [FixedConstraint] -->
        <RequiredPlugin name="Sofa.Component.Engine.Select"/> <!-- Needed to use components [BoxROI] -->
        <RequiredPlugin name="Sofa.Component.LinearSolver.Direct"/> <!-- Needed to use components [EigenSimplicialLDLT] -->
        <RequiredPlugin name="Sofa.Component.Mapping.Linear"/> <!-- Needed to use components [IdentityMapping] -->
        <RequiredPlugin name="Sofa.Component.Mass"/> <!-- Needed to use components [UniformMass] -->
        <RequiredPlugin name="Sofa.Component.ODESolver.Backward"/> <!-- Needed to use components [EulerImplicitSolver] -->
        <RequiredPlugin name="Sofa.Component.SceneUtility"/> <!-- Needed to use components [InfoComponent] -->
        <RequiredPlugin name="Sofa.Component.SolidMechanics.FEM.Elastic"/> <!-- Needed to use components [HexahedronFEMForceField] -->
        <RequiredPlugin name="Sofa.Component.StateContainer"/> <!-- Needed to use components [MechanicalObject] -->
        <RequiredPlugin name="Sofa.Component.Topology.Container.Dynamic"/> <!-- Needed to use components [TetrahedronSetGeometryAlgorithms,TetrahedronSetTopologyContainer,TetrahedronSetTopologyModifier,TriangleSetGeometryAlgorithms,TriangleSetTopologyContainer,TriangleSetTopologyModifier] -->
        <RequiredPlugin name="Sofa.Component.Topology.Container.Grid"/> <!-- Needed to use components [RegularGridTopology] -->
        <RequiredPlugin name="Sofa.Component.Topology.Mapping"/> <!-- Needed to use components [Hexa2TetraTopologicalMapping,Tetra2TriangleTopologicalMapping] -->
        <RequiredPlugin name="Sofa.Component.Visual"/> <!-- Needed to use components [VisualStyle] -->
        <RequiredPlugin name="Sofa.GL.Component.Rendering3D"/> <!-- Needed to use components [OglModel] -->
    </Node>

    <VisualStyle displayFlags="showBehaviorModels showForceFields" />
    <BlenderClient printLog="true"/>

    <DefaultAnimationLoop name="animationLoop"/>
    <DefaultVisualManagerLoop name="visualLoop"/>

    <EulerImplicitSolver name="odesolver" rayleighStiffness="0.1" rayleighMass="0.1" />
    <EigenSimplicialLDLT template="CompressedRowSparseMatrixMat3x3" ordering="Natural"/>

    <MechanicalObject name="DoFs" />
    <HexahedronFEMForceField name="FEM" youngModulus="4000" poissonRatio="0.3" method="large" />
    <UniformMass name="mass" totalMass="320" />
    <RegularGridTopology name="grid" nx="4" ny="4" nz="20" xmin="-1.5" xmax="1.5" ymin="-1.5" ymax="1.5" zmin="0" zmax="19" />
    <BoxROI name="box" box="-2 -2 -0.0001  2 2 0.0001"/>
    <FixedConstraint indices="@box.indices" />

    <Node name="Tetra">
        <TetrahedronSetTopologyContainer name="Container"/>
        <TetrahedronSetTopologyModifier name="Modifier"/>
        <TetrahedronSetGeometryAlgorithms template="Vec3" name="GeomAlgo"/>
        <Hexa2TetraTopologicalMapping input="@../grid" output="@Container"/>
        <Node name="Visualization">
            <TriangleSetTopologyContainer name="Container"/>
            <TriangleSetTopologyModifier name="Modifier"/>
            <TriangleSetGeometryAlgorithms template="Vec3" name="GeomAlgo"/>
            <Tetra2TriangleTopologicalMapping input="@../Container" output="@Container" flipNormals="1" />
            <OglModel name="Visual" color="0.3 0.3 1 1"/>
            <IdentityMapping input="@../../DoFs" output="@Visual"/>
        </Node>
    </Node>
</Node>
